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/batch
! ANSYS input file written by Workbench version 17.1 RELEASE
! File used for geometry attach: C:\Users\tapeltie\Documents\Ansys\Aufgabe_3_files\dp0\SYS\DM\SYS.agdb
/title,Aufgabe_3--Statisch-mechanisch (A5)
/com,--- Data in consistent NMM units. See Solving Units in the help system for more information.
/units,MPA
/prep7
! Turn off shape checking because checks already performed inside WB mesher.
! See help system for more information.
SHPP,OFF,,NOWARN
etcon,set             ! allow ANSYS to choose best KEYOP's for 180x elements
/com,*********** Nodes for the whole assembly ***********
nblock,3
(1i9,3e20.9e3)
        1    0.000000000E+000    0.000000000E+000    0.000000000E+000
        2    2.500000000E+002    0.000000000E+000    0.000000000E+000
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-1
/com,*********** Elements for Body 1 "Linienk_rper" ***********
et,1,188
keyo,1,3,2
eblock,19,solid,,1
(19i9)
        1        1        1        1        0        0        0        0        3        0        1        1        2        6
-1
/com,*********** Elements for Body 2 "Linienk_rper" ***********
et,2,188
keyo,2,3,2
eblock,19,solid,,1
(19i9)
        2        2        2        2        0        0        0        0        3        0        2        2        3        7
-1
/com,*********** Elements for Body 3 "Linienk_rper" ***********
et,3,188
keyo,3,3,2
eblock,19,solid,,1
(19i9)
        3        3        3        3        0        0        0        0        3        0        3        3        4        8
-1
/com,*********** Elements for Body 4 "Linienk_rper" ***********
et,4,188
keyo,4,3,2
eblock,19,solid,,1
(19i9)
        4        4        4        4        0        0        0        0        3        0        4        4        5        9
-1
/com,*********** Send User Defined Coordinate System(s) ***********
csys,0
toffst,273.15,  ! Temperature offset from absolute zero
/com,*********** Set Reference Temperature ***********
tref,22.
/com,*********** Send Materials ***********
MP,EX,1,30000,	! tonne s^-2 mm^-1
MP,NUXY,1,0,

MP,EX,2,30000,	! tonne s^-2 mm^-1
MP,NUXY,2,0,

MP,EX,3,30000,	! tonne s^-2 mm^-1
MP,NUXY,3,0,

MP,EX,4,30000,	! tonne s^-2 mm^-1
MP,NUXY,4,0,

/com,*********** Send Beam Properties ***********
SECTYPE,1,BEAM,RECT
SECDATA,10.,88.75

secoffset,cent
SECTYPE,2,BEAM,RECT
SECDATA,10.,66.25

secoffset,cent
SECTYPE,3,BEAM,RECT
SECDATA,10.,43.75

secoffset,cent
SECTYPE,4,BEAM,RECT
SECDATA,10.,21.25

secoffset,cent
!************************* Model Summary ********************
!Linienk_rper,	Material,	matid,	1
!Linienk_rper,	Material,	matid,	2
!Linienk_rper,	Material,	matid,	3
!Linienk_rper,	Material,	matid,	4
!************************* End Model Summary ********************
/com,*********** Fixed Supports ***********
CMBLOCK,_FIXEDSU,NODE,        1
(8i10)
         1
cmsel,s,_FIXEDSU
d,all,all
nsel,all
nsel,all
/com,*********** Define Vertex Force Using Follower Elements ***********
et,5,201
keyo,5,1,1           ! Keep the direction constant
keyo,5,2,1           ! Apply Forces only, not moment
mat,5
real,5
type,5
en,5,5
r,5
rmod,5,1,1.0,              ! FX
mat,6
real,6
type,5
en,6,5
r,6
rmod,6,2,1.0,              ! FY
mat,7
real,7
type,5
en,7,5
r,7
rmod,7,3,1.0,              ! FZ

*DIM,_loadvari37x,TABLE,2,1,1,TIME,
! Time values
_loadvari37x(1,0,1) = 0.
_loadvari37x(2,0,1) = 1.
! Load values
_loadvari37x(1,1,1) = 0.
_loadvari37x(2,1,1) = 20000.


*DIM,_loadvari37y,TABLE,2,1,1,TIME,
! Time values
_loadvari37y(1,0,1) = 0.
_loadvari37y(2,0,1) = 1.
! Load values
_loadvari37y(1,1,1) = 0.
_loadvari37y(2,1,1) = 0.


*DIM,_loadvari37z,TABLE,2,1,1,TIME,
! Time values
_loadvari37z(1,0,1) = 0.
_loadvari37z(2,0,1) = 1.
! Load values
_loadvari37z(1,1,1) = 0.
_loadvari37z(2,1,1) = 0.

fini
/com,****************************************************************************
/com,*************************    SOLUTION       ********************************
/com,****************************************************************************
/solu
antype,0                   ! static analysis
eqsl,sparse,,,,,1
cntr,print,1               ! print out contact info and also make no initial contact an error
dmpopt,emat,no             ! Don't combine emat file for DANSYS
dmpopt,esav,no             ! Don't combine esav file for DANSYS
nldiag,cont,iter           ! print out contact info each equilibrium iteration
resc,,none                 ! Do not keep any restart files
/com,****************************************************
/com,******************* SOLVE FOR LS 1 ****************
esel,s,real,,5
sfe,all,1,pres,1,%_loadvari37x%
esel,s,real,,6
sfe,all,1,pres,1,%_loadvari37y%
esel,s,real,,7
sfe,all,1,pres,1,%_loadvari37z%
esel,all
nsub,1,1,1
time,1.
outres,erase
outres,all,none
outres,nsol,all
outres,rsol,all
outres,strs,all
outres,epel,all
outres,eppl,all
esel,s,mat,,1
esel,a,mat,,2,4
cm,_elmisc,elem
esel,all
outres,misc,all,_elmisc
stabilize,off                   ! Stabilization turned OFF by user
! *********** WB SOLVE COMMAND ***********
! check interactive state
*get,ANSINTER_,active,,int
*if,ANSINTER_,ne,0,then
/eof
*endif
solve
/com *************** Write FE CONNECTORS *********
CEWRITE,file,ce,,INTE
/com,****************************************************
/com,*************** FINISHED SOLVE FOR LS 1 *************
*set,_DS_PROGRESS          ! turn off progress updates to avoid virus scanning bug
/post1
fini
